*Heading
** Job name: Prob3Q8 Model name: Model-1
** Generated by: Abaqus/CAE Student Edition 2020
*Preprint, echo=NO, model=NO, history=NO, contact=NO
**
** PARTS
**
*Part, name=Part-1
*Node
      1, -0.0704331398,  0.239873245
      2, -0.135160208,   0.21031338
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*Element, type=DC2D8
  1, 111, 112,  71,  70, 201, 202, 203, 204
  2,  92,  18,  86, 170, 205, 206, 207, 208
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*Nset, nset=_PickedSet2, internal, generate
   1,  563,    1
*Elset, elset=_PickedSet2, internal, generate
   1,  163,    1
*Nset, nset=ring
   1,   2,   3,   4,   5,   6
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*Elset, elset=ring
  5,  7, 12, 16, 17, 18
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*Nset, nset=bot1
  22,  24,  39,  40,  41,  42
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*Elset, elset=bot1
  11,  13,  15,  26,  27,  38,  42,  77,  79,  88,  92,  99, 106
*Nset, nset=right2
  24,  25,  51,  52,  53,  54
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*Elset, elset=right2
   4,   6,   8,   9,  38,  39,  46,  49,  55,  82, 102, 103, 110
*Nset, nset=top3
  23,  25,  63,  64,  65,  66
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*Elset, elset=top3
   1,   3,  46,  47,  57,  61,  66,  87,  91,  93,  94, 107, 117
*Nset, nset=left4
  22,  23,  27,  28,  29,  30
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*Elset, elset=left4
  26,  29,  30,  31,  34,  37,  57,  58,  74,  85,  95,  98, 101
** Section: Section-1
*Solid Section, elset=_PickedSet2, material=Material-1
,
*End Part
**
**
** ASSEMBLY
**
*Assembly, name=Assembly
**
*Instance, name=Part-1-1, part=Part-1
*End Instance
**
*Nset, nset=_PickedSet4, internal, instance=Part-1-1
   1,   2,   3,   4,   5,   6
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*Elset, elset=_PickedSet4, internal, instance=Part-1-1
  5,  7, 12, 16, 17, 18
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*Nset, nset=_PickedSet5, internal, instance=Part-1-1
  22,  23,  24,  25,  27,  28
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*Elset, elset=_PickedSet5, internal, instance=Part-1-1
   4,   6,   8,   9,  26,  29
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*Nset, nset=_PickedSet8, internal, instance=Part-1-1, generate
   1,  563,    1
*Elset, elset=_PickedSet8, internal, instance=Part-1-1, generate
   1,  163,    1
*Elset, elset=__PickedSurf6_S3, internal, instance=Part-1-1
  1, 93
*Elset, elset=__PickedSurf6_S4, internal, instance=Part-1-1
  3, 57, 61, 66, 87, 91, 94
*Elset, elset=__PickedSurf6_S2, internal, instance=Part-1-1
  46,  47, 107, 117
*Surface, type=ELEMENT, name=_PickedSurf6, internal
__PickedSurf6_S3, S3
__PickedSurf6_S4, S4
__PickedSurf6_S2, S2
*Elset, elset=__PickedSurf7_S4, internal, instance=Part-1-1
  11,  13,  15,  42,  77,  79,  88,  92, 106
*Elset, elset=__PickedSurf7_S2, internal, instance=Part-1-1
 26, 27, 99
*Elset, elset=__PickedSurf7_S1, internal, instance=Part-1-1
 38,
*Surface, type=ELEMENT, name=_PickedSurf7, internal
__PickedSurf7_S4, S4
__PickedSurf7_S2, S2
__PickedSurf7_S1, S1
*End Assembly
**
** MATERIALS
**
*Material, name=Material-1
*Conductivity
1.,
** ----------------------------------------------------------------
**
** STEP: Step-1
**
*Step, name=Step-1, nlgeom=NO
*Heat Transfer, steady state, deltmx=0.
1., 1., 1e-05, 1.,
**
** BOUNDARY CONDITIONS
**
** Name: leftandright Type: Temperature Using Analytical Field: leftandright
*Boundary
Part-1-1.22, 11, 11, 0.208947
Part-1-1.23, 11, 11, 0.208947
Part-1-1.24, 11, 11, 0.208947
Part-1-1.25, 11, 11, 0.208947
Part-1-1.27, 11, 11, 0.164006
Part-1-1.28, 11, 11, 0.128257
Part-1-1.29, 11, 11, 0.101046
Part-1-1.30, 11, 11, 0.0816286
Part-1-1.31, 11, 11, 0.0692431
Part-1-1.32, 11, 11, 0.0632407
Part-1-1.33, 11, 11, 0.0632407
Part-1-1.34, 11, 11, 0.0692431
Part-1-1.35, 11, 11, 0.0816286
Part-1-1.36, 11, 11, 0.101046
Part-1-1.37, 11, 11, 0.128257
Part-1-1.38, 11, 11, 0.164006
Part-1-1.51, 11, 11, 0.164006
Part-1-1.52, 11, 11, 0.128257
Part-1-1.53, 11, 11, 0.101046
Part-1-1.54, 11, 11, 0.0816286
Part-1-1.55, 11, 11, 0.0692431
Part-1-1.56, 11, 11, 0.0632407
Part-1-1.57, 11, 11, 0.0632407
Part-1-1.58, 11, 11, 0.0692431
Part-1-1.59, 11, 11, 0.0816286
Part-1-1.60, 11, 11, 0.101046
Part-1-1.61, 11, 11, 0.128257
Part-1-1.62, 11, 11, 0.164006
Part-1-1.216, 11, 11, 0.0904117
Part-1-1.224, 11, 11, 0.0654759
Part-1-1.232, 11, 11, 0.0746019
Part-1-1.236, 11, 11, 0.11363
Part-1-1.296, 11, 11, 0.185291
Part-1-1.308, 11, 11, 0.11363
Part-1-1.311, 11, 11, 0.0904117
Part-1-1.314, 11, 11, 0.0746019
Part-1-1.324, 11, 11, 0.0654759
Part-1-1.333, 11, 11, 0.0904117
Part-1-1.336, 11, 11, 0.185291
Part-1-1.339, 11, 11, 0.145021
Part-1-1.362, 11, 11, 0.185291
Part-1-1.373, 11, 11, 0.11363
Part-1-1.391, 11, 11, 0.0904117
Part-1-1.394, 11, 11, 0.185291
Part-1-1.398, 11, 11, 0.145021
Part-1-1.442, 11, 11, 0.0654759
Part-1-1.456, 11, 11, 0.0746019
Part-1-1.462, 11, 11, 0.0746019
Part-1-1.486, 11, 11, 0.0625
Part-1-1.490, 11, 11, 0.11363
Part-1-1.497, 11, 11, 0.145021
Part-1-1.498, 11, 11, 0.0654759
Part-1-1.500, 11, 11, 0.0625
Part-1-1.514, 11, 11, 0.145021
** Name: ring Type: Temperature
*Boundary
_PickedSet4, 11, 11
**
** LOADS
**
** Name: body   Type: Body heat flux Using Field: bodySource
*Dflux
Part-1-1.1, BF, -2.96673
Part-1-1.2, BF, -2.41619
Part-1-1.3, BF, -3.10718
Part-1-1.4, BF, -3.04393
Part-1-1.5, BF, -2.16156
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Part-1-1.163, BF, -2.64748
** Name: bot   Type: Surface heat flux Using Field: topbot
*Dflux
Part-1-1.11, S4, 0.54602
Part-1-1.13, S4, 0.5
Part-1-1.15, S4, 0.574171
Part-1-1.26, S2, 0.632598
Part-1-1.27, S2, 0.603688
Part-1-1.38, S1, 0.632598
Part-1-1.42, S4, 0.52211
Part-1-1.77, S4, 0.505814
Part-1-1.79, S4, 0.54602
Part-1-1.88, S4, 0.52211
Part-1-1.92, S4, 0.574171
Part-1-1.99, S2, 0.505814
Part-1-1.106, S4, 0.603688
** Name: top   Type: Surface heat flux Using Field: topbot
*Dflux
Part-1-1.1, S3, 0.52211
Part-1-1.3, S4, 0.574171
Part-1-1.46, S2, 0.632598
Part-1-1.47, S2, 0.603688
Part-1-1.57, S4, 0.632598
Part-1-1.61, S4, 0.54602
Part-1-1.66, S4, 0.54602
Part-1-1.87, S4, 0.574171
Part-1-1.91, S4, 0.52211
Part-1-1.93, S3, 0.5
Part-1-1.94, S4, 0.505814
Part-1-1.107, S2, 0.505814
Part-1-1.117, S2, 0.603688
**
** OUTPUT REQUESTS
**
*Restart, write, frequency=0
**
** FIELD OUTPUT: F-Output-1
**
*Output, field, variable=PRESELECT
*Output, history, frequency=0
*End Step
