*Heading
** Job name: Prob2Q8 Model name: Model-1
** Generated by: Abaqus/CAE Student Edition 2020
*Preprint, echo=NO, model=NO, history=NO, contact=NO
**
** PARTS
**
*Part, name=Part-1
*Node
      1,         -0.5,          0.5
      2,         -0.5,  0.400000006
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*Element, type=DC2D6
  1,   1,   2,  13, 122, 123, 124
  2,  13,  12,   1, 125, 126, 124
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*Nset, nset=Set-1, generate
   1,  441,    1
*Elset, elset=Set-1, generate
   1,  200,    1
*Nset, nset=bot1
  11,  22,  33,  44,  55,  66
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*Elset, elset=bot1, generate
  19,  199,   20
*Nset, nset=right2
 111, 112, 113, 114, 115, 116
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*Elset, elset=right2, generate
 182,  200,    2
*Nset, nset=top3
   1,  12,  23,  34,  45,  56
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*Elset, elset=top3, generate
   2,  182,   20
*Nset, nset=left4
   1,   2,   3,   4,   5,   6
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*Elset, elset=left4, generate
  1,  19,   2
** Section: Section-1
*Solid Section, elset=Set-1, material=Material-1
,
*End Part
**
**
** ASSEMBLY
**
*Assembly, name=Assembly
**
*Instance, name=Part-1-1, part=Part-1
*End Instance
**
*Nset, nset=_PickedSet5, internal, instance=Part-1-1
   1,   2,   3,   4,   5,   6
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*Elset, elset=_PickedSet5, internal, instance=Part-1-1, generate
  1,  19,   2
*Nset, nset=_PickedSet6, internal, instance=Part-1-1, generate
   1,  441,    1
*Elset, elset=_PickedSet6, internal, instance=Part-1-1, generate
   1,  200,    1
*Elset, elset=__PickedSurf4_S1, internal, instance=Part-1-1, generate
 182,  200,    2
*Surface, type=ELEMENT, name=_PickedSurf4, internal
__PickedSurf4_S1, S1
*End Assembly
**
** MATERIALS
**
*Material, name=Material-1
*Conductivity
1.,
** ----------------------------------------------------------------
**
** STEP: Step-1
**
*Step, name=Step-1, nlgeom=NO
*Heat Transfer, steady state, deltmx=0.
1., 1., 1e-05, 1.,
**
** BOUNDARY CONDITIONS
**
** Name: leftESS Type: Temperature
*Boundary
_PickedSet5, 11, 11
**
** LOADS
**
** Name: body   Type: Body heat flux
*Dflux
_PickedSet6, BF, 2.
** Name: rightNeu   Type: Surface heat flux
*Dsflux
_PickedSurf4, S, 2.
**
** OUTPUT REQUESTS
**
*Restart, write, frequency=0
**
** FIELD OUTPUT: F-Output-1
**
*Output, field, variable=PRESELECT
*Output, history, frequency=0
*End Step
